!!------------------------------------------------------------
!! APDL CODE
!! CLAMPED VERTICAL CYLINDER – FREE VIBRATION ANALYSIS
!!
!! Author: M. Erden Yildizdag
!! Affiliation: Istanbul Technical University
!!
!! Description:
!! This script performs a modal (free vibration) analysis
!! of a clamped beam using ANSYS APDL.
!!
!! Usage: For academic and research purposes only.
!!------------------------------------------------------------
/PREP7
R     = 0.07725      ! cylinder radius
L     = 0.231        ! cylinder length
t     = 0.0015       ! shell thickness
E     = 2.05e11      ! Young's modulus [Pa]
NU    = 0.30         ! Poisson's ratio
RHO   = 7800         ! density [kg/m^3]
nL    = 60           ! number of divisions along length
nTH   = 80           ! number of divisions along circumference
NMODE = 20           ! number of requested modes
!!----------------------
!! MATERIAL PROPERTIES
!!----------------------
ET,1,SHELL181
MPTEMP,,,,,,,,
MPTEMP,1,0
MPDATA,EX,1,,E
MPDATA,PRXY,1,,NU
MPDATA,DENS,1,,RHO
!!----------
!! SECTION
!!----------
SECT,1,SHELL,,
SECDATA,T,1,0.0,3
SECOFFSET,MID
SECCONTROL,,,,,,,
!!----------
!! GEOMETRY
!!----------
K,1, R, 0, 0
K,2, 0, R, 0
K,3,-R, 0, 0
K,4, 0,-R, 0
K,5, 0, 0, 0
K,6, 0, 0, L
LARC,1,2,5,R
LARC,2,3,5,R
LARC,3,4,5,R
LARC,4,1,5,R
L,5,6
ADRAG,1,2,3,4,,,5
!!------
!! MESH
!!------
ALLSEL,ALL
AESIZE,ALL,0.004
AMESH,ALL
!!---------------------
!! BOUNDARY CONDITIONS
!!---------------------
NSEL,S,LOC,Z,0,0
D,ALL,,0,,,,ALL,,,,,
ALLSEL,ALL
FINISH
!!----------
!! SOLUTION
!!----------
/SOLU
ANTYPE,2
MODOPT,LANB,NMODE
EQSLV,SPAR
MXPAND,0, , ,0
LUMPM,0
PSTRES,0
MODOPT,LANB,NMODE,0,0,,OFF
SOLVE
FINISH
